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/batch
! ANSYS input file written by Workbench version 2020 R1
! File used for geometry attach: C:\Users\viswa\Documents\M Tech\II Year\Project My attempt\CAD & Simulation\Design Data\Generated_Models\D01.step
/title,D17_simulation.wbpz--Static Structural (A5)
/com,--- Data in consistent MKS units. See Solving Units in the help system for more information.
/units,MKS
/prep7
! Turn off shape checking because checks already performed inside WB mesher.
! See help system for more information.
SHPP,OFF,,NOWARN
etcon,set             ! allow ANSYS to choose best KEYOP's for 180x elements
/com,*********** Nodes for the whole assembly ***********
nblock,3,,683
(1i9,3e20.9e3)
        1     9.500000000E-02     5.000000000E-03     5.000000000E-03
        2     9.000000000E-02     5.000000000E-03     5.000000000E-03
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-1
/com,*********** Elements for Body 1 "D01-FreeParts|Beam" ***********
et,1,186
keyo,1,2,1          ! set full integration on SOLID186
eblock,19,solid,,80
(19i9)
        1        1        1        1        0        0        0        0       20        0        1        1      108      111      152       38      109      110      189
      193      502      508      195      341      504      507      343      191      501      506      568
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-1
/com,*********** Send User Defined Coordinate System(s) ***********
csys,0
toffst,273.15,  ! Temperature offset from absolute zero
/com,*********** Set Reference Temperature ***********
tref,22.
/com,*********** Send Materials ***********
MP,EX,1,2000000000,	! Pa
MP,NUXY,1,0.35,
MP,DENS,1,1040,	! kg m^-3

!************************* Model Summary ********************
!D01-FreeParts|Beam,	ABS,	matid,	1
!************************* End Model Summary ********************
/com,*********** Fixed Supports ***********
CMBLOCK,_FIXEDSU,NODE,       21
(8i10)
        99       100       101       102       103       104       105       106
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cmsel,s,_FIXEDSU
d,all,all
nsel,all
/com,*********** Define Force Using Surface Effect Elements ***********
local,12,0,0.,0.,0.,0.,0.,0.
csys,0
et,2,154
eblock,10,,,4
(15i9)
      249        2        2        2       12      111      108       97       96      502      483      480      481
      250        2        2        2       12      110      109      108      111      504      501      502      506
      251        2        2        2       12      108      113       98       97      503      484      482      483
      252        2        2        2       12      109      112      113      108      505      509      503      501
-1
esel,s,type,,2
keyop,2,2,1                ! Apply load in local coordinate system
keyop,2,7,1                ! Use original area so load is constant in large deformation
keyop,2,11,2               ! Use real and not project area
esel,all
fini
/com,****************************************************************************
/com,*************************    SOLUTION       ********************************
/com,****************************************************************************
/solu
antype,0                   ! static analysis
_thickRatio=  0     ! Ratio of thick parts in the model
eqsl,sparse,,,,,1
cntr,print,1               ! print out contact info and also make no initial contact an error
dmpoption,emat,no             ! Don't combine emat file for DANSYS
dmpoption,esav,no             ! Don't combine esav file for DANSYS
nldiag,cont,iter           ! print out contact info each equilibrium iteration
rescontrol,,none                 ! Do not keep any restart files
/com,****************************************************
/com,******************* SOLVE FOR LS 1 OF 1 ****************
esel,s,type,,2
nsle
sfe,all,1,pres,1,-2500000.00000019
sfe,all,2,pres,1,0.
sfe,all,3,pres,1,0.
nsel,all
esel,all
nsub,1,1,1
time,1.
outres,erase
outres,all,none
outres,nsol,all,
outres,rsol,all
outres,eangl,all
outres,etmp,all
outres,veng,all
outres,strs,all,
outres,epel,all,
outres,eppl,all,
outres,cont,all,
! *********** WB SOLVE COMMAND ***********
! check interactive state
*get,ANSINTER_,active,,int
*if,ANSINTER_,ne,0,then
/eof
*endif
solve
/com *************** Write FE CONNECTORS *********
CEWRITE,file,ce,,INTE
/com,****************************************************
/com,*************** FINISHED SOLVE FOR LS 1 *************
/post1
fini
